OpenVSP model (file version 5), 3 components.
Geometry view with OpenVSP parameter names; values to 6 digits, angles in degrees, lengths in the model's unit.
Overall bounding box: X_Min=0 X_Len=10 Y_Min=-0.666667 Y_Len=1.33333 Z_Min=-0.666667 Z_Len=1.33333

Pod "PodGeom"
  location (X Y Z) 0 0 0, rotation 0 0 0
  bounding box size 10 1.33333 1.33333
  Design: FineRatio=15 Length=10

BodyOfRevolution "BORGeom"
  location (X Y Z) 0 0 0, rotation 0 0 0
  bounding box size 9.95 0.85 0.85
  Design: A0=0 Ae=0 Amin=0 AminW=0 Angle=0 Diameter=2 Mode=1
  profile: super ellipse Super_Height=0.85 Super_M=2 Super_MaxWidthLoc=0 Super_N=2 Super_Width=9.95

BodyOfRevolution "BORGeom", child of "BORGeom"
  location (X Y Z) 0 0 0, rotation 0 0 0
  bounding box size 9.95 0.85 0.85
  Design: A0=0 Ae=0 Amin=0 AminW=0 Angle=0 Diameter=2 Mode=1
  profile: super ellipse Super_Height=0.85 Super_M=2 Super_MaxWidthLoc=0 Super_N=2 Super_Width=9.95
